folder simulations: version=37; creator=Apsim 7.9-r4044
  memo
    Testing SoilWat and SWIM for OLW-DS
  simulation SoilWat_HAS
    summaryfile
    area ConvTill
      surfaceom SurfaceOrganicMatter
        PoolName = wheat  # Organic Matter pool name
        type = wheat  # Organic Matter type
        mass = 1000  # Initial surface residue (kg/ha)
        cnr = 80  # C:N ratio of initial residue
        standing_fraction = 0  # Fraction of residue standing
      fertiliser
      maize
      folder Manager folder
        operations SimpleSowRule
          10-oct  maize sow plants =10, sowing_depth = 50,  cultivar = Pioneer_35P12_104' ,  row_spacing = 750,  crop_class = plant
        manager Harvesting rule
          # Harvesting criteria
          crop = maize  # Enter name of crop to harvest when ripe
          on end_of_day:
```
           if [crop].StageName = 'harvest_ripe' or [crop].plant_status = 'dead' then
              [crop]  harvest
              [crop]  end_crop
           endif
```
        operations FertiliserSimpleRules
          10-oct  fertiliser apply amount= 40 (kg/ha), type= urea_N (), depth= 10 (mm)
          10-dec  fertiliser apply amount= 150 (kg/ha), type= urea_N (), depth= 10 (mm)
        manager Tillage
          # When should tillage be performed
          modulename = maize  # The module the event come from
          eventname = sowing  # On which event should tillage be done
          # Tillage details
          surfaceommodule = SurfaceOrganicMatter  # Module used to apply the tillage
          tillage_type = disc
          tillage_depth = 20  # User_defined depth of seedbed preparation (mm)
          tillage_f_incorp = 0.5  # User_defined fraction of surface residues to incorporate (0-1)
          on sowing:
```
 '[surfaceommodule]' tillage type = [tillage_type], f_incorp = [tillage_f_incorp] (), tillage_depth = [tillage_depth]
```
      manager ExtraVariables
        on init:
```
leachSum = 0 kg N-no3/fa
drainSum = 0 mm
HarvIndex = 0
tempSum = 0
tempAv = 0
rainSum = 0
dayCount = 0
eoSum=0 ! pot ET
esSum=0 ! soil evap
runoffSum = 0
```
        on start_of_day:
```
dayCount = dayCount + 1
leachSum = leachSum + flow_no3(4)
drainSum = drainSum + drain
tempSum = (tempSum + (mint + maxt)*0.5)
tempAv = tempSum/dayCount
rainSum = rain + rainSum 
eoSum= eo + eoSum 
esSum= es + esSum
runoffSum = runoffSum + runoff

if (biomass>0) then
HarvIndex = yield/biomass
else
HarvIndex = 0 
endif
```
        on sowing:
```
leachSum = 0
drainSum = 0
HarvIndex = 0
dayCount = 0
tempAv = 0
rainSum = 0
tempSum = 0
eoSum= 0 
esSum= 0
runoffSum = 0
```
      outputfile: filename=SoilWat_HAS ConvTill.out; title=SoilWat_HAS ConvTill
        variables
          variables: dd/mm/yyyy as Date, biomass, yield, grain_protein, grain_size, esw, sw, surfaceom_c, leachSum, no3(), drainSum, HarvIndex as HI, NfertTot, fertiliser, ReadyToSow, n_stress_expan, n_stress_grain, n_stress_pheno, n_stress_photo, n_stress_tiller, sw_stress_expan, sw_stress_pheno, sw_stress_photo, sw_stress_tiller, leaf_no_final
        events Reporting Frequency: event=harvesting
      outputfile dailyTest: filename=SoilWat_HAS ConvTill dailyTest.out; title=SoilWat_HAS ConvTill dailyTest
        variables
          variables: dd/mm/yyyy as Date, ReadyToSow, SowByMoisture, SowByTemp, SWD_top, TempAvRun, n_stress_expan, n_stress_grain, n_stress_pheno, n_stress_photo, n_stress_tiller, sw_stress_expan, sw_stress_pheno, sw_stress_photo, sw_stress_tiller, fertiliser, irrigation, rain, es as evaporation, drain, sw_dep(), dnit() as denitrification, surfaceom_n, fom_n(), biom_n(), hum_n(), urea(), nh4(), no3(), sat_dep(), dul_dep(), ll15_dep()
        events Reporting Frequency: event=daily
      outputfile outSimple: filename=SoilWat_HAS ConvTill outSimple.out; title=SoilWat_HAS ConvTill outSimple
        variables
          variables: dd/mm/yyyy as Date, biomass, yield, HarvIndex as HI, leaf_no_final, surfaceom_c, leachSum, no3() as no3_tot, NfertTot, fertiliser, irrigation, tempAv, rainSum, dayCount, esSum, eoSum, esw, sw() as SoilWater, drainSum, runoffSum
        events Reporting Frequency: event=harvesting
      Soil Hastings_29a1: SoilType=m; Latitude=-41; Longitude=174; YearOfSampling=0
        DataSource=Profile descriptions provided by Smap based on the work done by Trevor Webb.
        LayerStructure: Thickness=[100, 500, 350, 350, 350, 350]
        Water
          Thickness  BD       AirDry  LL15   DUL    SAT      KS
          100        0.94116  0.0825  0.165  0.484  0.58404  1440
          500        1.18151  0.1368  0.171  0.427  0.49569  960
          350        1.6492   0.049   0.049  0.174  0.38223  1920
          350        1.6492   0.049   0.049  0.174  0.38223  1920
          350        1.6492   0.049   0.049  0.174  0.38223  1920
          350        1.6492   0.049   0.049  0.174  0.38223  1920
          SoilCrop Ryegrass_Clover: LL=[0.165, 0.171, 0.049, 0.049, 0.049, 0.049]; KL=[0.15, 0.111123, 0.0101228, 0, 0, 0]; XF=[1, 1, 1, 1, 1, 1]
          SoilCrop maize: LL=[0.165, 0.171, 0.049, 0.049, 0.049, 0.049]; KL=[0.15, 0.111123, 0.07, 0.03, 0.02, 0]; XF=[1, 1, 1, 1, 1, 1]
          SoilCrop wheat: LL=[0.165, 0.171, 0.049, 0.049, 0.049, 0.049]; KL=[0.15, 0.111123, 0.07, 0.03, 0, 0]; XF=[1, 1, 1, 1, 1, 1]
        SoilOrganicMatter: RootCN=40; RootWt=1000; SoilCN=11; EnrACoeff=7.4; EnrBCoeff=0.2; OCUnits=Total
          Thickness  OC        FBiom      FInert
          100        2.6       0.0396327  0.268398
          500        0.684552  0.0148983  0.702553
          350        0.216171  0.0103825  0.916884
          350        0.200983  0.0100468  0.970915
          350        0.20006   0.0100057  0.989822
          350        0.200004  0.0100007  0.996438
        Analysis: PHUnits=Water; BoronUnits=HotWater
          Thickness  Rocks  PH  CEC      ParticleSizeSand  ParticleSizeSilt  ParticleSizeClay
          100        0      7   16.014   8                 72                20
          500        0      7   11.7042  8                 72                20
          1400       0      7   1.72055  90                7                 3
        Sample Initial nitrogen: NO3Units=kgha; NH4Units=kgha; SWUnits=Volumetric; OCUnits=Total; PHUnits=Water
          Thickness  NO3       NH4
          100        13.3      0.1
          500        53.4333   0.1
          350        0.816667  0.1
          350        0.816667  0.1
          350        0.816667  0.1
          350        0.816667  0.1
        InitialWater Initial water: FractionFull=1; PercentMethod=FilledFromTop
        SoilWater: SummerCona=4.4; SummerU=9; SummerDate=1-oct; WinterCona=4.4; WinterU=9; WinterDate=1-apr; DiffusConst=88; DiffusSlope=35; Salb=0.13; CN2Bare=73; CNRed=20; CNCov=0.8; MaxPond=30
          Thickness  SWCON  KLAT
          100        0.3    0
          500        0.3    0
          1400       0.45   0
    metfile met
      filename=C:\GitHubRepos\2016_SAE_Tillage_ClimateChange\weather\HawkesBay_VCSN_agent_28460_rean1970.met
    clock
      start_date = 01/09/1982  # Enter the start date of the simulation
      end_date = 31/12/2000  # Enter the end date of the simulation
    manager ClimateControl
      # Climate Control Window
      date1 = 1-jan  # Enter window START date (dd-mmm)
      date2 = 31-dec  # Enter window END date (dd-mmm)
      # Climate Change Parameters
      MaxtChange = 0  # Change in maximum temperature (oC)
      MintChange = 0  # Change in minimum temperature (oC)
      RainChange = 1  # Fractional multiplier of daily rainfall (0-1)
      RadnChange = 0  # Relative change in daily radiation (%)
      CO2 = 350  # Atmospheric CO2 Concentration (ppm)
      on prenewmet:
```
!  Adjust daily temperatures, rainfall and radiation up or down according to user-defined amounts
! To apply different levels of climate control to different times of year add multiple copies of this logic into your simulation and change the window.

if (date_within('[date1], [date2]') = 1) then
   maxt = maxt + [MaxtChange]
   mint = mint + [MintChange]
!   rain = rain + rain * [RainChange] / 100 ! Changed to fit the logic of producing sim files now is "fractional" multiplier of rainfall
    rain = rain * [RainChange]
   radn = radn + radn * [RadnChange] / 100
   co2 = [CO2]
 endif
```
      on Init:
```
co2 = [CO2]
tav = tav + ([MaxtChange] + [MintChange]) / 2
```
  simulation SoilWat_OA -> /simulations/SoilWat_HAS
    area ConvTill -> /simulations/SoilWat_HAS/ConvTill
      outputfile -> /simulations/SoilWat_HAS/ConvTill/outputfile: filename=SoilWat_OA ConvTill.out; title=SoilWat_OA ConvTill
        variables -> /simulations/SoilWat_HAS/ConvTill/outputfile/Variables
        events Reporting Frequency -> /simulations/SoilWat_HAS/ConvTill/outputfile/Reporting Frequency
      outputfile dailyTest -> /simulations/SoilWat_HAS/ConvTill/dailyTest: filename=SoilWat_OA ConvTill dailyTest.out; title=SoilWat_OA ConvTill dailyTest
        variables -> /simulations/SoilWat_HAS/ConvTill/dailyTest/Variables
        events Reporting Frequency -> /simulations/SoilWat_HAS/ConvTill/dailyTest/Reporting Frequency
      outputfile outSimple -> /simulations/SoilWat_HAS/ConvTill/outSimple: filename=SoilWat_OA ConvTill outSimple.out; title=SoilWat_OA ConvTill outSimple
        variables -> /simulations/SoilWat_HAS/ConvTill/outSimple/Variables
        events Reporting Frequency -> /simulations/SoilWat_HAS/ConvTill/outSimple/Reporting Frequency
      Soil Oaklea_9a1: SoilType=m; Latitude=-41; Longitude=174; YearOfSampling=0
        DataSource=Profile descriptions provided by Smap based on the work done by Trevor Webb.
        LayerStructure: Thickness=[150.0, 325.0, 305.0, 305.0, 305.0, 305.0, 305.0]
        Water
          Thickness  BD       AirDry     LL15    DUL       SAT        KS
          150        1.378    0.07585    0.1517  0.328375  0.41292    1440
          325        1.55025  0.0980769  0.1275  0.2445    0.2894625  960
          305        1.5529   0.042      0.042   0.08075   0.096255   960
          305        1.5529   0.042      0.042   0.08075   0.096255   960
          305        1.5529   0.042      0.042   0.08075   0.096255   960
          305        1.5529   0.042      0.042   0.08075   0.096255   960
          305        1.5529   0.042      0.042   0.08075   0.096255   960
          SoilCrop Ryegrass_Clover: LL=[0.1517, 0.1275, 0.042, 0.042, 0.042, 0.042, 0.042]; KL=[0.15, 0.139162, 0.0210234, 0, 0, 0, 0]; XF=[1, 1, 0.825307, 0.825307, 0.825307, 0.825307, 0.825307]
          SoilCrop maize: LL=[0.165, 0.171, 0.049, 0.049, 0.049, 0.049, 0.049]; KL=[0.15, 0.11, 0.07, 0.03, 0.02, 0.02, 0]; XF=[1, 1, 1, 1, 1, 1, 1]
          SoilCrop wheat: LL=[0.165, 0.171, 0.049, 0.049, 0.049, 0.049, 0.049]; KL=[0.15, 0.111123, 0.07, 0.03, 0.02, 0, 0]; XF=[1, 1, 1, 1, 1, 1, 1]
        SoilOrganicMatter: RootCN=40; RootWt=1000; SoilCN=11; EnrACoeff=7.4; EnrBCoeff=0.2
          Thickness  OC        FBiom      FInert
          150.0      2.6       0.0355051  0.321261
          325.0      0.854076  0.0161342  0.667135
          305.0      0.252627  0.0109267  0.870622
          305.0      0.204587  0.0101487  0.948182
          305.0      0.2004    0.0100238  0.979246
          305.0      0.200035  0.0100038  0.991688
          305.0      0.200003  0.0100006  0.996671
        Analysis
          Thickness  Rocks  PH   CEC      ParticleSizeSand  ParticleSizeSilt  ParticleSizeClay
          150.0      7.5    7.0  16.213   11.0              67.0              22.0
          325.0      25.0   7.0  12.2847  11.0              67.0              22.0
          1525.0     75.0   7.0  10.7134  12.5              65.5              22.0
        Sample Initial nitrogen: NO3Units=kgha; NH4Units=kgha; SWUnits=Volumetric; OCUnits=Total; PHUnits=Water
          Thickness  NO3       NH4
          150.0      19.95     0.1
          325.0      43.225    0.1
          305.0      3.97833   0.1
          305.0      0.711667  0.1
          305.0      0.711667  0.1
          305.0      0.711667  0.1
          305.0      0.711667  0.1
        InitialWater Initial water: FractionFull=1; PercentMethod=FilledFromTop
        SoilWater: SummerCona=4.4; SummerU=9; SummerDate=1-oct; WinterCona=4.4; WinterU=9; WinterDate=1-apr; DiffusConst=88; DiffusSlope=35; Salb=0.13; CN2Bare=73; CNRed=20; CNCov=0.8; MaxPond=30
          Thickness  SWCON  KLAT
          150.0      0.3    0.0
          325.0      0.35   0.0
          1525.0     0.3    0.0
  simulation SWIM3_HAS
    metfile met
      filename=C:\GitHubRepos\2016_SAE_Tillage_ClimateChange\weather\HawkesBay_VCSN_agent_28460_rean1970.met
    clock
      start_date = 01/09/1982  # Enter the start date of the simulation
      end_date = 31/12/1985  # Enter the end date of the simulation
    summaryfile
    area ConvTill
      surfaceom SurfaceOrganicMatter
        PoolName = wheat  # Organic Matter pool name
        type = wheat  # Organic Matter type
        mass = 1000  # Initial surface residue (kg/ha)
        cnr = 80  # C:N ratio of initial residue
        standing_fraction = 0  # Fraction of residue standing
      fertiliser
      folder Manager folder
        operations SimpleSowRule: same as SoilWat_HAS.ConvTill.Manager folder.SimpleSowRule
        manager Harvesting rule
          # Harvesting criteria
          crop = maize  # Enter name of crop to harvest when ripe
          on end_of_day:
          script: same as in SoilWat_HAS.ConvTill.Manager folder.Harvesting rule
        operations FertiliserSimpleRules: same as SoilWat_HAS.ConvTill.Manager folder.FertiliserSimpleRules
        manager Tillage: same as SoilWat_HAS.ConvTill.Manager folder.Tillage
        irrigation (disabled)
          automatic_irrigation = off
          asw_depth = 600  # Depth to which ASW is calculated. (mm)
          crit_fr_asw = 0.7  # Fraction of ASW below which irrigation is applied (0-1.0)
          irrigation_efficiency = 1  # Efficiency of the irrigation. (0-1.0)
          irrigation_allocation = off  # Allocation limits
          allocation = 0  # Allocation in mm
          default_no3_conc = 0.0  # Nitrate concentration (ppm N)
          default_nh4_conc = 0.0  # Ammonium concentration (ppm N)
          default_cl_conc = 0.0  # Chloride concentration (ppm Cl)
      outputfile: filename=SWIM3_HAS ConvTill.out; title=SWIM3_HAS ConvTill
        variables: same as SoilWat_HAS.ConvTill.outputfile.Variables
        events Reporting Frequency: event=harvesting
      maize
      manager ExtraVariables: same as SoilWat_HAS.ConvTill.ExtraVariables
      outputfile dailyTest: filename=SWIM3_HAS ConvTill dailyTest.out; title=SWIM3_HAS ConvTill dailyTest
        variables: same as SoilWat_HAS.ConvTill.dailyTest.Variables
        events Reporting Frequency: event=daily
      Soil Hastings_29a1: SoilType=m; Latitude=-41; Longitude=174; YearOfSampling=0
        DataSource=Profile descriptions provided by Smap based on the work done by Trevor Webb.
        LayerStructure: Thickness=[100, 500, 350, 350, 350, 350]
        Water
          Thickness  BD       AirDry  LL15   DUL    SAT      KS
          100        0.94116  0.0825  0.165  0.484  0.58404  1440
          500        1.18151  0.1368  0.171  0.427  0.49569  960
          350        1.6492   0.049   0.049  0.174  0.38223  1920
          350        1.6492   0.049   0.049  0.174  0.38223  1920
          350        1.6492   0.049   0.049  0.174  0.38223  1920
          350        1.6492   0.049   0.049  0.174  0.38223  1920
          SoilCrop Ryegrass_Clover: LL=[0.165, 0.171, 0.049, 0.049, 0.049, 0.049]; KL=[0.15, 0.111123, 0.0101228, 0, 0, 0]; XF=[1, 1, 1, 1, 1, 1]
          SoilCrop maize: LL=[0.165, 0.171, 0.049, 0.049, 0.049, 0.049]; KL=[0.15, 0.11, 0.07, 0.03, 0.02, 0]; XF=[1, 1, 1, 1, 1, 1]
          SoilCrop wheat: LL=[0.165, 0.171, 0.049, 0.049, 0.049, 0.049]; KL=[0.15, 0.111123, 0.07, 0.03, 0, 0]; XF=[1, 1, 1, 1, 1, 1]
        Swim: Salb=0.13; CN2Bare=75; CNRed=20; CNCov=0.8; KDul=0.1; PSIDul=-100; VC=true; DTmin=0; DTmax=1440; MaxWaterIncrement=10; SpaceWeightingFactor=0; SoluteSpaceWeightingFactor=0; Diagnostics=false
          SwimSoluteParameters: Dis=15; Disp=1; A=1; DTHP=1
            zero: DTHC, WaterTableCl, WaterTableNO3, WaterTableNH4, WaterTableUrea, WaterTableTracer, WaterTableMineralisationInhibitor, WaterTableUreaseInhibitor, WaterTableNitrificationInhibitor, WaterTableDenitrificationInhibitor
            Thickness  NO3Exco  NO3FIP  NH4Exco  NH4FIP  UreaExco  UreaFIP  ClExco  ClFIP
            1000       0        1       100      1       0         1        0       1
            1000       0        1       100      1       0         1        0       1
            1000       0        1       100      1       0         1        0       1
        SoilOrganicMatter: same as SoilWat_HAS.ConvTill.Hastings_29a1.SoilOrganicMatter
        Analysis: same as SoilWat_HAS.ConvTill.Hastings_29a1.Analysis
        Sample Initial nitrogen: NO3Units=kgha; NH4Units=kgha; SWUnits=Volumetric; OCUnits=Total; PHUnits=Water
          Thickness  NO3       NH4
          100        13.3      0.1
          500        53.4333   0.1
          350        0.816667  0.1
          350        0.816667  0.1
          350        0.816667  0.1
          350        0.816667  0.1
        InitialWater Initial water: FractionFull=1; PercentMethod=FilledFromTop
      outputfile outSimple: filename=SWIM3_HAS ConvTill outSimple.out; title=SWIM3_HAS ConvTill outSimple
        variables
          variables: dd/mm/yyyy as Date, biomass, yield, HarvIndex as HI, leaf_no_final, surfaceom_c, leachSum, no3() as no3_tot, NfertTot, fertiliser, irrigation, tempAv, rainSum, dayCount, esSum, eoSum, esw, sw() as SoilWater, drainSum, runoffSum
        events Reporting Frequency: event=harvesting
    manager ClimateControl: same as SoilWat_HAS.ClimateControl
  simulation SWIM3_OA -> /simulations/SWIM3_HAS
    area ConvTill -> /simulations/SWIM3_HAS/ConvTill
      outputfile -> /simulations/SWIM3_HAS/ConvTill/outputfile: filename=SWIM3_OA ConvTill.out; title=SWIM3_OA ConvTill
        variables -> /simulations/SWIM3_HAS/ConvTill/outputfile/Variables
        events Reporting Frequency -> /simulations/SWIM3_HAS/ConvTill/outputfile/Reporting Frequency
      outputfile dailyTest -> /simulations/SWIM3_HAS/ConvTill/dailyTest: filename=SWIM3_OA ConvTill dailyTest.out; title=SWIM3_OA ConvTill dailyTest
        variables -> /simulations/SWIM3_HAS/ConvTill/dailyTest/Variables
        events Reporting Frequency -> /simulations/SWIM3_HAS/ConvTill/dailyTest/Reporting Frequency
      outputfile outSimple -> /simulations/SWIM3_HAS/ConvTill/outSimple: filename=SWIM3_OA ConvTill outSimple.out; title=SWIM3_OA ConvTill outSimple
        variables -> /simulations/SWIM3_HAS/ConvTill/outSimple/Variables
        events Reporting Frequency -> /simulations/SWIM3_HAS/ConvTill/outSimple/Reporting Frequency
      Soil Oaklea_9a1: SoilType=m; Latitude=-41; Longitude=174; YearOfSampling=0
        DataSource=Profile descriptions provided by Smap based on the work done by Trevor Webb.
        LayerStructure: Thickness=[150.0, 325.0, 305.0, 305.0, 305.0, 305.0, 305.0]
        Water
          Thickness  BD       AirDry     LL15    DUL       SAT        KS
          150        1.378    0.07585    0.1517  0.328375  0.41292    1440
          325        1.55025  0.0980769  0.1275  0.2445    0.2894625  960
          305        1.5529   0.042      0.042   0.08075   0.096255   960
          305        1.5529   0.042      0.042   0.08075   0.096255   960
          305        1.5529   0.042      0.042   0.08075   0.096255   960
          305        1.5529   0.042      0.042   0.08075   0.096255   960
          305        1.5529   0.042      0.042   0.08075   0.096255   960
          SoilCrop Ryegrass_Clover: LL=[0.1517, 0.1275, 0.042, 0.042, 0.042, 0.042, 0.042]; KL=[0.15, 0.139162, 0.0210234, 0, 0, 0, 0]; XF=[1, 1, 0.825307, 0.825307, 0.825307, 0.825307, 0.825307]
          SoilCrop maize: LL=[0.165, 0.171, 0.049, 0.049, 0.049, 0.049, 0.049]; KL=[0.15, 0.11, 0.07, 0.03, 0.02, 0.02, 0]; XF=[1, 1, 1, 1, 1, 1, 1]
          SoilCrop wheat: LL=[0.165, 0.171, 0.049, 0.049, 0.049, 0.049, 0.049]; KL=[0.15, 0.111123, 0.07, 0.03, 0.02, 0, 1]; XF=[1, 1, 1, 1, 1, 1, 1]
        Swim: same as SWIM3_HAS.ConvTill.Hastings_29a1.Swim
        SoilOrganicMatter: same as SoilWat_OA.ConvTill.Oaklea_9a1.SoilOrganicMatter
        Analysis
          Thickness  Rocks  PH   CEC      ParticleSizeSand  ParticleSizeSilt  ParticleSizeClay
          150.0      7.5    7.0  16.213   11.0              67.0              22.0
          325.0      25.0   7.0  12.2847  11.0              67.0              22.0
          1525.0     75.0   7.0  10.7134  12.5              65.5              22.0
        Sample Initial nitrogen: same as SoilWat_OA.ConvTill.Oaklea_9a1.Initial nitrogen
        InitialWater Initial water: FractionFull=1; PercentMethod=FilledFromTop
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