folder simulations: version=36; creator=Apsim 7.7-r3786
  memo
    Issues to resolve:
    - Why is leaching so different between models?
    - Not sensitive to Ks in SWIM - check
  simulation Maize_SWIM3
    metfile met
      filename=C:\GitHubRepos\2016_SAE_Tillage_ClimateChange\weather\HawkesBay_VCSN_agent_28460_rean1970.met
    clock
      start_date = 01/09/1982  # Enter the start date of the simulation
      end_date = 31/12/2000  # Enter the end date of the simulation
    summaryfile
    area ConvTill
      Soil: SoilType=Black Vertosol; LocalName=Waco; Site=Jimbour; NearestTown=Jimbour, Q 4352; Region=South East Queensland; NaturalVegetation=Grassland, mainly Qld bluegrass; Latitude=0; Longitude=0; YearOfSampling=0
        InitialWater Initial water: FractionFull=1; PercentMethod=FilledFromTop; RelativeTo=ll15
        Water
          Thickness  BD    AirDry  LL15  DUL   SAT   KS
          150        1.02  0.12    0.15  0.35  0.45  50
          150        1.03  0.12    0.15  0.35  0.45  50
          300        1.02  0.12    0.15  0.35  0.45  50
          300        1.02  0.12    0.15  0.35  0.45  50
          300        1.06  0.12    0.15  0.35  0.45  50
          300        1.11  0.12    0.15  0.35  0.45  50
          300        1.12  0.12    0.15  0.35  0.45  50
          300        1.15  0.12    0.15  0.35  0.45  50
          300        1.18  0.12    0.15  0.35  0.45  50
          300        1.2   0.12    0.15  0.35  0.45  50
          300        1.25  0.12    0.15  0.35  0.45  50
          SoilCrop Barley
            LL=[0.29, 0.29, 0.32, 0.38, 0.39, 0.39, 0.41, 0.48, 0.47, 0.46, 0.44]
            KL=[0.1, 0.1, 0.08, 0.06, 0.04, 0.02, 0.01, 0, 0, 0, 0]
            XF=[1, 1, 1, 1, 1, 1, 1, 0, 0, 0, 0]
          SoilCrop Chickpea
            LL=[0.29, 0.29, 0.36, 0.43, 0.51, 0.5, 0.5, 0.48, 0.47, 0.46, 0.44]
            KL=[0.1, 0.1, 0.08, 0.06, 0.04, 0.02, 0.01, 0, 0, 0, 0]
            XF=[1, 1, 1, 1, 1, 1, 1, 0, 0, 0, 0]
          SoilCrop Lucerne
            LL=[0.29, 0.29, 0.29, 0.29, 0.3, 0.31, 0.32, 0.33, 0.34, 0.35, 0.36]
            KL=[0.1, 0.1, 0.1, 0.1, 0.09, 0.09, 0.09, 0.09, 0.09, 0.09, 0.09]
            XF=[1, 1, 1, 1, 1, 1, 1, 1, 1, 1, 1]
          SoilCrop Maize
            LL=[0.29, 0.29, 0.34, 0.34, 0.37, 0.4, 0.42, 0.48, 0.47, 0.46, 0.44]
            KL=[0.1, 0.1, 0.1, 0.08, 0.06, 0.04, 0.02, 0, 0, 0, 0]
            XF=[1, 1, 1, 1, 1, 1, 1, 0, 0, 0, 0]
          SoilCrop Perennial Grass
            LL=[0.29, 0.29, 0.39, 0.41, 0.4, 0.4, 0.41, 0.41, 0.4, 0.4, 0.42]
            KL=[0.1, 0.1, 0.1, 0.1, 0.09, 0.07, 0.05, 0, 0, 0, 0]
            XF=[1, 1, 1, 1, 1, 1, 1, 0, 0, 0, 0]
          SoilCrop Sorghum
            LL=[0.29, 0.29, 0.35, 0.38, 0.4, 0.4, 0.4, 0.48, 0.47, 0.46, 0.44]
            KL=[0.1, 0.1, 0.1, 0.08, 0.06, 0.04, 0.02, 0, 0, 0, 0]
            XF=[1, 1, 1, 1, 1, 1, 1, 0, 0, 0, 0]
          SoilCrop Wheat
            LL=[0.29, 0.29, 0.32, 0.32, 0.35, 0.38, 0.41, 0.48, 0.47, 0.46, 0.44]
            KL=[0.1, 0.1, 0.08, 0.06, 0.04, 0.02, 0.01, 0, 0, 0, 0]
            XF=[1, 1, 1, 1, 1, 1, 1, 0, 0, 0, 0]
        SoilOrganicMatter: RootCN=40; RootWt=200; SoilCN=12.5; EnrACoeff=7.4; EnrBCoeff=0.2; OCUnits=Total
          Thickness  OC    FBiom  FInert
          150        1.04  0.025  0.4
          150        0.89  0.02   0.6
          300        0.89  0.015  0.8
          300        0.89  0.01   0.9
          300        0.77  0.01   0.95
          300        0.45  0.01   0.95
          300        0.27  0.01   0.95
          300        0.22  0.01   0.95
          300        0.16  0.01   0.95
          300        0.13  0.01   0.95
          300        0.12  0.01   0.95
        Analysis: PHUnits=Water; BoronUnits=HotWater
          Thickness  EC    PH
          150        0.2   8.4
          150        0.25  8.8
          300        0.31  9
          300        0.4   9.2
          300        0.59  9.2
          300        0.84  9.1
          300        0.93  9
          300        1.01  9
          300        1.06  8.9
          300        1.05  8.9
          300        1.01  8.9
        Sample Initial nitrogen: NO3Units=kgha; NH4Units=kgha; SWUnits=Volumetric; OCUnits=Total; PHUnits=Water
          Thickness  NO3      NH4
          150        8.58396  0.790686
          150        2.99393  0.142501
          300        6.303    0.300002
          300        5.35815  0.315002
          300        5.6133   0.330002
          300        6.1236   0.360003
          300        6.37875  0.375003
          300        6.6339   0.390003
          300        6.88905  0.405003
          300        7.1442   0.420003
          300        7.1442   0.420003
        Swim: Salb=0.13; CN2Bare=75; CNRed=20; CNCov=0.8; KDul=5; PSIDul=-100; VC=true; DTmin=0; DTmax=1440; MaxWaterIncrement=10; SpaceWeightingFactor=0; SoluteSpaceWeightingFactor=0; Diagnostics=false
          SwimSoluteParameters: Dis=15; Disp=1; A=1; DTHP=1
            zero: DTHC, WaterTableCl, WaterTableNO3, WaterTableNH4, WaterTableUrea, WaterTableTracer, WaterTableMineralisationInhibitor, WaterTableUreaseInhibitor, WaterTableNitrificationInhibitor, WaterTableDenitrificationInhibitor
            Thickness  NO3Exco  NO3FIP  NH4Exco  NH4FIP  UreaExco  UreaFIP  ClExco  ClFIP
            1000       0        1       100      1       0         1        0       1
            1000       0        1       100      1       0         1        0       1
            1000       0        1       100      1       0         1        0       1
        LayerStructure: Thickness=[150, 150, 300, 300, 300, 300, 300, 300, 300, 300, 300]
      surfaceom SurfaceOrganicMatter
        PoolName = wheat  # Organic Matter pool name
        type = wheat  # Organic Matter type
        mass = 1000  # Initial surface residue (kg/ha)
        cnr = 80  # C:N ratio of initial residue
        standing_fraction = 0  # Fraction of residue standing
      fertiliser
      folder Manager folder
        operations SimpleSowRule (disabled)
          15-sep  maize sow plants =10, sowing_depth = 50,  cultivar = 'long ' ,  row_spacing = 750,  crop_class = plant
        manager Harvesting rule (disabled)
          # Harvesting criteria
          crop = maize  # Enter name of crop to harvest when ripe
          on end_of_day:
```
           if [crop].StageName = 'harvest_ripe' or [crop].plant_status = 'dead' then
              [crop]  harvest
              [crop]  end_crop
           endif
```
        operations FertiliserSimpleRules
          15-sep  fertiliser apply amount= 15 (kg/ha), type= urea_N (), depth= 10 (mm)
          16-oct  fertiliser apply amount= 50 (kg/ha), type= urea_N (), depth= 10 (mm)
          15-nov  fertiliser apply amount= 50 (kg/ha), type= urea_N(), depth= 10 (mm)
          01-dec  fertiliser apply amount= 50 (kg/ha), type= urea_N(), depth= 10 (mm)
          01-jan  fertiliser apply amount= 50 (kg/ha), type= urea_N(), depth= 10 (mm)
        manager Tillage
          # When should tillage be performed
          modulename = maize  # The module the event come from
          eventname = sowing  # On which event should tillage be done
          # Tillage details
          surfaceommodule = SurfaceOrganicMatter  # Module used to apply the tillage
          tillage_type = disc
          tillage_depth = 20  # User_defined depth of seedbed preparation (mm)
          tillage_f_incorp = 0.5  # User_defined fraction of surface residues to incorporate (0-1)
          on sowing:
```
 '[surfaceommodule]' tillage type = [tillage_type], f_incorp = [tillage_f_incorp] (), tillage_depth = [tillage_depth]
```
        irrigation
          automatic_irrigation = on
          asw_depth = 600  # Depth to which ASW is calculated. (mm)
          crit_fr_asw = 0.7  # Fraction of ASW below which irrigation is applied (0-1.0)
          irrigation_efficiency = 1  # Efficiency of the irrigation. (0-1.0)
          irrigation_allocation = off  # Allocation limits
          allocation = 0  # Allocation in mm
          default_no3_conc = 0.0  # Nitrate concentration (ppm N)
          default_nh4_conc = 0.0  # Ammonium concentration (ppm N)
          default_cl_conc = 0.0  # Chloride concentration (ppm Cl)
      outputfile: filename=Maize_SWIM3 ConvTill.out; title=Maize_SWIM3 ConvTill
        variables
          variables: dd/mm/yyyy as Date, biomass, yield, grain_protein, grain_size, esw, sw, surfaceom_c, leachSum, no3(), drainSum, HarvIndex as HI, NfertTot, fertiliser, ReadyToSow, n_stress_expan, n_stress_grain, n_stress_pheno, n_stress_photo, n_stress_tiller, sw_stress_expan, sw_stress_pheno, sw_stress_photo, sw_stress_tiller
        events Reporting Frequency: event=harvesting
      maize
        ini
          filename=C:\apsim_dev\Projects\CCII\2013_Maize_NZ(Validation)\MaizeValidation.xml
      manager ExtraVariables
        on init:
```
leachSum = 0 kg N-no3/fa
drainSum = 0 mm
HarvIndex = 0
```
        on start_of_day:
```
leachSum = leachSum + flow_no3(4)
drainSum = drainSum + drain

if (biomass>0) then
HarvIndex = yield/biomass
else
HarvIndex = 0 
endif
```
        on sowing:
```
leachSum = 0
drainSum = 0
HarvIndex = 0
```
      outputfile dailyTest: filename=Maize_SWIM3 ConvTill dailyTest.out; title=Maize_SWIM3 ConvTill dailyTest
        variables
          variables: dd/mm/yyyy as Date, ReadyToSow, SowByMoisture, SowByTemp, SWD_top, TempAvRun, n_stress_expan, n_stress_grain, n_stress_pheno, n_stress_photo, n_stress_tiller, sw_stress_expan, sw_stress_pheno, sw_stress_photo, sw_stress_tiller, fertiliser, irrigation, rain, sw_dep(), dnit() as denitrification, surfaceom_n, fom_n(), biom_n(), hum_n(), urea(), nh4(), no3()
        events Reporting Frequency: event=daily
    manager ClimateControl
      # Climate Control Window
      date1 = 1-jan  # Enter window START date (dd-mmm)
      date2 = 31-dec  # Enter window END date (dd-mmm)
      # Climate Change Parameters
      MaxtChange = 0  # Change in maximum temperature (oC)
      MintChange = 0  # Change in minimum temperature (oC)
      RainChange = 0  # Relative change in daily rainfall (%)
      RadnChange = 0  # Relative change in daily radiation (%)
      CO2 = 350  # Atmospheric CO2 Concentration (ppm)
      on prenewmet:
```
!  Adjust daily temperatures, rainfall and radiation up or down according to user-defined amounts
! To apply different levels of climate control to different times of year add multiple copies of this logic into your simulation and change the window.

if (date_within('[date1], [date2]') = 1) then
   maxt = maxt + [MaxtChange]
   mint = mint + [MintChange]
   rain = rain + rain * [RainChange] / 100
   radn = radn + radn * [RadnChange] / 100
   co2 = [CO2]
 endif
```
      on Init:
```
co2 = [CO2]
tav = tav + ([MaxtChange] + [MintChange]) / 2
```
  simulation Maize_SoilWat
    summaryfile
    area ConvTill
      Soil: SoilType=Black Vertosol; LocalName=Waco; Site=Jimbour; NearestTown=Jimbour, Q 4352; Region=South East Queensland; NaturalVegetation=Grassland, mainly Qld bluegrass; Latitude=0; Longitude=0; YearOfSampling=0
        InitialWater Initial water: FractionFull=1; PercentMethod=FilledFromTop
        SoilWater: SummerCona=3.5; SummerU=6; SummerDate=1-Nov; WinterCona=3.5; WinterU=6; WinterDate=1-Apr; DiffusConst=40; DiffusSlope=16; Salb=0.13; CN2Bare=73; CNRed=20; CNCov=0.8; Thickness=[150, 150, 300, 300, 300, 300, 300, 300, 300, 300, 300]; SWCON=[0.3, 0.3, 0.3, 0.3, 0.3, 0.3, 0.3, 0.3, 0.3, 0.3, 0.3]
        SoilOrganicMatter: same as Maize_SWIM3.ConvTill.Soil.SoilOrganicMatter
        Analysis
          Thickness  EC    PH
          150        0.2   8.4
          150        0.25  8.8
          300        0.31  9
          300        0.4   9.2
          300        0.59  9.2
          300        0.84  9.1
          300        0.93  9
          300        1.01  9
          300        1.06  8.9
          300        1.05  8.9
          300        1.01  8.9
        Sample Initial nitrogen: NO3Units=ppm; NH4Units=ppm; SWUnits=Volumetric; OCUnits=Total; PHUnits=Water
          Thickness  NO3    NH4
          150        6.503  0.599004
          150        2.101  0.100001
          300        2.101  0.100001
          300        1.701  0.100001
          300        1.701  0.100001
          300        1.701  0.100001
          300        1.701  0.100001
          300        1.701  0.100001
          300        1.701  0.100001
          300        1.701  0.100001
          300        1.701  0.100001
        Water -> /simulations/Maize_SWIM3/ConvTill/Soil/Water
      surfaceom SurfaceOrganicMatter
        PoolName = wheat  # Organic Matter pool name
        type = wheat  # Organic Matter type
        mass = 1000  # Initial surface residue (kg/ha)
        cnr = 80  # C:N ratio of initial residue
        standing_fraction = 0  # Fraction of residue standing
      fertiliser
      maize
        ini -> /simulations/Maize_SWIM3/ConvTill/maize/ini
      folder Manager folder -> /simulations/Maize_SWIM3/ConvTill/Manager folder
        manager SowingRuleFancy (disabled)
          # Sowing criteria
          date1 = 15-sep  # Enter sowing window START date (dd-mmm)
          date2 = 16-sep  # Enter sowing window END date (dd-mmm)
          must_sow = yes  # Must sow?
          raincrit = 0  # Amount of rainfall
          rainnumdays = 0  # Number of days of rainfall
          esw_amount = 0  # Enter minimum allowable available soil water (mm)
          # Sowing parameters
          crop = maize  # Enter name of crop to sow
          density = 10  # Enter sowing density (plants/m2)
          depth = 50  # Enter sowing depth (mm)
          cultivar = Pioneer_3902  # Enter cultivar
          class = plant  # Enter crop growth class
          row_spacing = 750  # Enter row spacing (mm)
          SWFTopMinF = 0.6  # Enter MIN water content top layer (0-1 * PAW)
          SWFTopMaxF = 1.05  # Enter MAX water content top layer (0-1 * DUL)
          SowTempLim = 13  # Enter average temperature last 15 days for sow (oC)
          on start_of_day:
```
!-------- Soil water deficit used to trigger sowing rules (fraction of water in soil)
SWD_top = (sw(1) - ll15(1))/(dul(1) - ll15(1)) ! Fraction of plant available water in top layer (fractional)

!-------------------Running average temperature
TempAv = (maxt + mint) * 0.5
TempAvRun = (TempAvRun  * (TempAvPer  - 1) + TempAv ) / TempAvPer

!!! SOWING Temp and mositure rules
SowByMoisture = 0
SowByTemp = 0

         if (SWD_top<= SWFTopMax and SWD_top>= SWFTopMin) then
            SowByMoisture = 1
         endif
         if (TempAvRun > TempAvCritSow) then ! FIXME this threshold needs to be defined in the crop element
            SowByTemp = 1
         endif
         
        ReadyToSow = SowByMoisture * SowByTemp 


! Sowing logic
      if (paddock_is_fallow() = 1 and FallowIn <> 'yes' and (NextCrop = 0 or NextCrop = '[crop]')) then
         if (date_within('[date1], [date2]') = 1) then
            if (rain[[rainnumdays]] >= [raincrit] AND esw >= [esw_amount]) OR
                ('[must_sow]' = 'yes' AND today = date('[date2]'))) THEN
               ChooseNextCrop = 'yes'   ! for rotations
               [crop] sow plants =[density], sowing_depth = [depth], cultivar = [cultivar], row_spacing = [row_spacing], crop_class = [class]

! re-set triggers
SowByMoisture = 0
SowByTemp = 0
ReadyToSow = 0

            endif
            if today = date('[date2]') then
               ChooseNextCrop = 'yes'
            endif
         endif
      endif
```
          on init:
```
nextcrop = 0
fallowin = 0

! ---- sowing related variables

! parameters
TempAvCritSow = '[SowTempLim]' 
SWFTopMax = [SWFTopMaxF]   ! Measure of "too" wet to sow in top most soil layer
SWFTopMin = [SWFTopMinF]   ! Measure of "too" dry to sow in top most soil layer
TempAvPer = 15 ! number of days to calculate running temperature (FIXME: hardcoded now)   

! variables
TempAvRun  = 0
SowByMoisture = 0
SowByTemp = 0
ReadyToSow = 0
```
      manager ExtraVariables -> /simulations/Maize_SWIM3/ConvTill/ExtraVariables
      outputfile -> /simulations/Maize_SWIM3/ConvTill/outputfile: filename=Maize_SoilWat ConvTill.out; title=Maize_SoilWat ConvTill
        variables -> /simulations/Maize_SWIM3/ConvTill/outputfile/Variables
        events Reporting Frequency -> /simulations/Maize_SWIM3/ConvTill/outputfile/Reporting Frequency
      outputfile dailyTest -> /simulations/Maize_SWIM3/ConvTill/dailyTest: filename=Maize_SoilWat ConvTill dailyTest.out; title=Maize_SoilWat ConvTill dailyTest
        variables -> /simulations/Maize_SWIM3/ConvTill/dailyTest/Variables
        events Reporting Frequency -> /simulations/Maize_SWIM3/ConvTill/dailyTest/Reporting Frequency
    metfile met -> /simulations/Maize_SWIM3/met
    clock -> /simulations/Maize_SWIM3/clock
    manager ClimateControl -> /simulations/Maize_SWIM3/ClimateControl
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